# [area: Варьирование комплекса 1-ого уровня (Ось Х)]
λ_к := 6
M := 0.01, 0.011 .. 5.9
X(M) :=
    xf ← λ_к*sqrt(M^2 - 1) if M ≥ 1
    xf ← -λ_к*sqrt(|M^2 - 1|) if M < 1
    return xf
# [area: Варьирование комплекса 2-го уровня (График)]
χ_0_min_left := root(λ_к*tan(x) + 0.5, x, -π/2, 0) = -4.76364 deg
χ_0_min := root(λ_к*tan(x) + 0, x, -π/2, π/2) = 0 deg
χ_0_min_min_1 := root(λ_к*tan(x) - 0.25, x, 0, π/2) = 2.38594 deg
χ_0_min_1 := root(λ_к*tan(x) - 0.5, x, 0, π/2) = 4.76364 deg
χ_0_min_1_1 := root(λ_к*tan(x) - 0.75, x, 0, π/2) = 7.12502 deg
χ_0_1 := root(λ_к*tan(x) - 1, x, 0, π/2) = 9.46232 deg
χ_0_1_2 := root(λ_к*tan(x) - 1.5, x, 0, π/2) = 14.0362 deg
χ_0_1_1_2 := root(λ_к*tan(x) - 1.25, x, 0, π/2) = 11.7683 deg
χ_0_2 := root(λ_к*tan(x) - 2, x, 0, π/2) = 18.4349 deg
χ_0_1_2_2 := root(λ_к*tan(x) - 1.75, x, 0, π/2) = 16.2602 deg
χ_0_2_3 := root(λ_к*tan(x) - 2.5, x, 0, π/2) = 22.6202 deg
χ_0_2_2_3 := root(λ_к*tan(x) - 2.25, x, 0, π/2) = 20.556 deg
χ_0_3 := root(λ_к*tan(x) - 3, x, 0, π/2) = 26.5651 deg
χ_0_2_3_3 := root(λ_к*tan(x) - 2.75, x, 0, π/2) = 24.6236 deg
χ_0_3_4 := root(λ_к*tan(x) - 3.5, x, 0, π/2) = 30.2564 deg
χ_0_4 := root(λ_к*tan(x) - 4, x, 0, π/2) = 33.6901 deg
χ_0_4_5 := root(λ_к*tan(x) - 4.5, x, 0, π/2) = 36.8699 deg
χ_0_5 := root(λ_к*tan(x) - 5, x, 0, π/2) = 39.8056 deg
χ_0_5_max := root(λ_к*tan(x) - 5.5, x, 0, π/2) = 42.5104 deg
χ_0_max := root(λ_к*tan(x) - 6, x, 0, π/2) = 45 deg
χ_0_max_right := root(λ_к*tan(x) - 6.5, x, 0, π/2) = 47.2906 deg
λ_к*tan(χ_0_1) = 1
λ_к*tan(χ_0_1_1_2) = 1.25
λ_к*tan(χ_0_1_2) = 1.5
λ_к*tan(χ_0_1_2_2) = 1.75
λ_к*tan(χ_0_2) = 2
λ_к*tan(χ_0_2_2_3) = 2.25
λ_к*tan(χ_0_2_3) = 2.50004
λ_к*tan(χ_0_min_left) = -0.5
λ_к*tan(χ_0_min) = 0
λ_к*tan(χ_0_min_min_1) = 0.25
λ_к*tan(χ_0_min_1) = 0.5
λ_к*tan(χ_0_min_1_1) = 0.75
λ_к*tan(χ_0_2_3_3) = 2.75
λ_к*tan(χ_0_3) = 3
λ_к*tan(χ_0_3_4) = 3.5
λ_к*tan(χ_0_4) = 4
λ_к*tan(χ_0_4_5) = 4.5
λ_к*tan(χ_0_6) =  # error: Эта переменная не определена.
λ_к*tan(χ_0_5) = 5
λ_к*tan(χ_0_5_max) = 5.5
λ_к*tan(χ_0_max_right) = 6.5
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