c := AASM6_Cf_M0(2000000, 1) = [0.000969449; 1 + 1i; 1000000 + 2000000i]
Re := 0.5*10^6, 1*10^6 .. 1*10^9
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AASM6_Cf_M0(1, 0) = [0.00449881; 0; 1000000 + 1i]
AASM6_Cf_M0(Re, 0.45)[0] =  # no stored result
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