# [area: Варьирование комплекса 1-ого уровня (Ось Х)]
λ_к := 5
M := 0.01, 0.011 .. 5.9
X(M) :=
    xf ← λ_к*sqrt(M^2 - 1) if M ≥ 1
    xf ← -λ_к*sqrt(|M^2 - 1|) if M < 1
    return xf
# [area: Варьирование комплекса 2-ого уровня (Кривая на графике)]
c¯_min := root(λ_к*nthroot(x, 3) - 0, x, 0, 1) = 0
c¯_1 := root(λ_к*nthroot(x, 3) - 0.25, x, 0, 1) = 0.000125002
c¯_1_2 := root(λ_к*nthroot(x, 3) - (0.25 + 0.5)*0.5, x, 0, 1) = 0.00042207
c¯_2 := root(λ_к*nthroot(x, 3) - 0.5, x, 0, 1) = 0.00100087
c¯_2_3 := root(λ_к*nthroot(x, 3) - (0.5 + 1)*0.5, x, 0, 1) = 0.00337552
c¯_3 := root(λ_к*nthroot(x, 3) - 1, x, 0, 1) = 0.00800002
c¯_3_4 := root(λ_к*nthroot(x, 3) - (1 + 1.5)*0.5, x, 0, 1) = 0.0156365
c¯_4 := root(λ_к*nthroot(x, 3) - 1.5, x, 0, 1) = 0.027
c¯_4_5 := root(λ_к*nthroot(x, 3) - (1.5 + 1.7)*0.5, x, 0, 1) = 0.032768
c¯_5 := root(λ_к*nthroot(x, 3) - 1.7, x, 0, 1) = 0.039304
c¯_max := root(λ_к*nthroot(x, 3) - 5, x, 0, 1) = 1
λ_к*nthroot(c¯_min, 3) = 0
λ_к*nthroot(c¯_1, 3) = 0.250001
λ_к*nthroot(c¯_1_2, 3) = 0.375058
λ_к*nthroot(c¯_2, 3) = 0.500144
λ_к*nthroot(c¯_2_3, 3) = 0.750039
λ_к*nthroot(c¯_3, 3) = 1
λ_к*nthroot(c¯_3_4, 3) = 1.25031
λ_к*nthroot(c¯_4, 3) = 1.5
λ_к*nthroot(c¯_4_5, 3) = 1.6
λ_к*nthroot(c¯_5, 3) = 1.7
λ_к*nthroot(c¯_max, 3) = 5
# [area: Варьирование комплекса 3-его уровня (График)]
χ_0.5_min := root(λ_к*tan(x) - (-3), x, -π/2, π/2) = -30.9638 deg
χ_0.5_1 := root(λ_к*tan(x) - 0, x, 0, π/2) = 0 deg
χ_0.5_1_2 := root(λ_к*tan(x) - (0 + 1)*0.5, x, 0, π/2) = 5.71059 deg
χ_0.5_2 := root(λ_к*tan(x) - 1, x, 0, π/2) = 11.3099 deg
χ_0.5_2_3 := root(λ_к*tan(x) - (1 + 2)*0.5, x, 0, π/2) = 16.6992 deg
χ_0.5_3 := root(λ_к*tan(x) - 2, x, 0, π/2) = 21.8002 deg
χ_0.5_3_4 := root(λ_к*tan(x) - (2 + 3)*0.5, x, 0, π/2) = 26.5651 deg
χ_0.5_4 := root(λ_к*tan(x) - 3, x, 0, π/2) = 30.9638 deg
χ_0.5_max := root(λ_к*tan(x) - 6, x, 0, π/2) = 50.1944 deg
λ_к*tan(χ_0.5_min) = -3
λ_к*tan(χ_0.5_1) = 0
λ_к*tan(χ_0.5_1_2) = 0.5
λ_к*tan(χ_0.5_2) = 1
λ_к*tan(χ_0.5_2_3) = 1.5
λ_к*tan(χ_0.5_3) = 1.99988
λ_к*tan(χ_0.5_3_4) = 2.5
λ_к*tan(χ_0.5_4) = 3
λ_к*tan(χ_0.5_max) = 6
ζ_0 := 0
ζ_0.1 := 0.1
ζ_0.2 := 0.2
ζ_0.25 := 0.25
ζ_0.333 := 0.333333
ζ_0.5 := 0.5
ζ_1 := 1
χ_0.5 := χ_0.5_min = -0.540419
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λ_к*tan(χ_0.5) = -3
X(M) =  # no stored result
χ_0.5 := χ_0.5_1 = 0
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λ_к*tan(χ_0.5) = 0
χ_0.5 := χ_0.5_1_2 = 0.0996687
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λ_к*tan(χ_0.5) = 0.5
χ_0.5 := χ_0.5_2 = 0.197396
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λ_к*tan(χ_0.5) = 1
χ_0.5 := χ_0.5_2_3 = 0.291457
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λ_к*tan(χ_0.5) = 1.5
χ_0.5 := χ_0.5_3 = 0.380486
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λ_к*tan(χ_0.5) = 1.99988
χ_0.5 := χ_0.5_3_4 = 0.463648
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λ_к*tan(χ_0.5) = 2.5
χ_0.5 := χ_0.5_4 = 0.540419
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λ_к*tan(χ_0.5) = 3
χ_0.5 := χ_0.5_max = 0.876058
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λ_к*tan(χ_0.5) > 3
