λ_к := 5
λ_к*tan(0) = 0
M := -4.0, -3.995 .. 10
λ_к*tan(0.675) = 4.00212
X(M) :=
    xf ← λ_к*sqrt(M^2 - 1) if M ≥ 1
    xf ← -λ_к*sqrt(|M^2 - 1|) if M < 1
    return xf
atan(1/5) = 0.197396
c := AASM6_Coordinate_zz_v(0.5, 3, 6, 1)[0]  # error: Угол должен быть меньше 90 градусов
ζ_кη1 := 1
ζ_к0.75 := 0.75 = 0.75
ζ_кη2 := 1/2 = 0.5
ζ_к0.25 := 0.25 = 0.25
ζ_кηinf := 0
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atan(1/5) = 0.197396
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atan(2/5) = 0.380506
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