# [area: Варьирование 1-го комплекса (ось Х)]
M := 0.4, 0.41 .. 6
# [area: Варьирование 2-го комплекса (кривая)]
λ_корм := transpose([1, 1.25, 1.5, 1.75, 2, 2.25, 2.5, 2.75, 3])
# [area: Варьирование 3-ко комплекса (серия кривых)]
η_корм := transpose([0, 0.25, 0.5, 0.675, 0.75, 0.875, 1])
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AASM6_Cxcor_Par(2.9, 2.5, 0.5) = [0.0420793; 0.5 + 1i; 2.5 + 2i; 0.6 + 2.9i]
η_корм := 0
λ_корм := transpose([1.75, 2, 2.25, 2.5, 2.75, 3, 3.25])
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η_корм = 0
η_корм := 0.25
λ_корм := transpose([1.25, 1.5, 1.75, 2, 2.25, 2.5, 2.75, 3, 3.25])
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η_корм = 0.25
η_корм := 0.5
λ_корм := transpose([1.25, 1.5, 1.75, 2, 2.25, 2.5, 2.75])
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η_корм = 0.5
η_корм := 0.625
λ_корм := transpose([0.75, 1, 1.25, 1.5, 1.75, 2, 2.25, 2.5, 2.75])
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η_корм = 0.625
η_корм := 0.75
λ_корм := transpose([0.75, 1, 1.25, 1.5, 1.75, 2, 2.25])
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η_корм = 0.75
η_корм := 0.875
λ_корм := transpose([0.75, 1, 1.25, 1.5, 1.75, 2, 2.25])
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η_корм = 0.875
η_корм := 1
λ_корм := transpose([0.75, 1, 1.25, 1.5, 1.75, 2, 2.25])
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η_корм = 1
