M := 0.1, 0.105 .. 8
a := 320.545
ν := 22.11*10^-6
x_t‾ := 0.2
λ_f := 4
L_ф := 1
Re(M) := M*a*L_ф/ν
c_f(M1, Re, x_t‾) := AASM6_Sigma_M(M1, x_t‾)[0]*AASM6_Cf_M0(Re, x_t‾)[0]/1
p_dn(M1, Re, x_t‾) := 0.0155/sqrt(λ_f*c_f(M1, Re, x_t‾))
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