# [area: Варьирование комплекса 1-ого уровня (Ось Х)]
λ_k := 1
M := 1, 1.001 .. sqrt(69)
X(M) :=
    xf ← λ_k*sqrt(M^2 - 1) if M ≥ 1
    xf ← -λ_k*sqrt(|M^2 - 1|) if M < 1
    return xf
c_0_5 := 0.5^3
c_0_75 := 0.75^3
c_1 := 1.0^3
c_1_25 := 1.25^3
c_1_5 := 1.5^3
c_2 := 2^3
# [area: Варьирование комплекса 2-ого уровня (Кривая на графике)]
x_c_0 := atan(0) = 0
x_c_0_5 := atan(0.5) = 0.463648
x_c_1 := atan(1) = 0.785398
x_c_1_5 := atan(1.5) = 0.982794
x_c_2 := atan(2) = 1.10715
x_c_2_5 := atan(2.5) = 1.19029
x_c_3 := atan(3) = 1.24905
x_c_3_5 := atan(3.5) = 1.2925
x_c_4 := atan(4) = 1.32582
x_c_4_5 := atan(4.5) = 1.35213
AASM6_Cxw_Rhomb_M1_Gra(M, cc, ζ_k, χ_c, λ_k) := AASM6_Cxw_Rhomb_M1(M, cc, ζ_k, χ_c, λ_k)/(λ_k*cc^2)
AASM6_Cxw_Rhomb_M1_Gra(M, cc, ζ_k, χ_c, λ_k) :=
    xx ← AASM6_Cxw_Rhomb_M1(M, cc, ζ_k, χ_c, λ_k)
    xx[0] ← xx[0]/(λ_k*cc^2)
    xx
# [area: eta_k = 1]
ζ_k := 1
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AASM6_Cxw_Rhomb_M1_Gra(4, 0.03, 2, 30*deg, 2) =  # error: Число не должно быть больше 1
X(2) = 1.73205
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# [area: eta_k = 2.5]
ζ_k := 1/2.5 = 0.4
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# [area: eta_k = 5]
ζ_k := 1/5 = 0.2
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# [area: zeta_k = 0.1]
ζ_k := 0.1
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# [area: eta_k = inf]
ζ_k := 0
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