# [area: Варьирование комплекса 1-ого уровня (Ось Х)]
λ_нос := 0.5
M := 0.01, 0.011 .. 3.0
X(M) :=
    xf ← sqrt(M^2 - 1)/λ_нос if M ≥ 1
    xf ← -sqrt(|M^2 - 1|)/λ_нос if M < 1
    return xf
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# Всё хорошо
A := AASM6_Cyalf_ConCil(1.2, λ_нос, 1.5)
A = [3.35684; 3 + 4i; 1.32665 + 2.6i]
Re(A[1]) ≤ Im(A[1]) = 1
Re(A[1]) = 3
Im(A[1]) = 4
Re(A[2]) ≤ Im(A[2]) = 1
Re(A[2]) = 1.32665
Im(A[2]) = 2.6
# Выход за правую границу комплекса х2
A := AASM6_Cyalf_ConCil(2, λ_нос, 1.5)
A = [3.29508; 3 + 4i; 3.4641 + 2.6i]
Re(A[1]) ≤ Im(A[1]) = 1
Re(A[1]) = 3
Im(A[1]) = 4
Re(A[2]) ≤ Im(A[2]) = 0
Re(A[2]) = 3.4641
Im(A[2]) = 2.6
# Выход за левую границу комплекса х2
A := AASM6_Cyalf_ConCil(0.85, λ_нос, 1.5)
A = [2.02025; 3 + 4i; -0.8 - 1.05357i]
Re(A[1]) ≤ Im(A[1]) = 1
Re(A[1]) = 3
Im(A[1]) = 4
Re(A[2]) ≤ Im(A[2]) = 0
Re(A[2]) = -0.8
Im(A[2]) = -1.05357
