c¯_1_left := 0.035
xc1_left := 0.325
c_n := 0, 0.0005 .. 0.8
c¯_1 := 0.04
xc1 := 0.35
c¯_1_2 := 0.05
xc1_2 := 0.375
c¯_2 := 0.06
xc2 := 0.4
c¯_2_3 := 0.075
xc2_3 := 0.45
c¯_3 := 0.09
xc3 := 0.5
c¯_3_4 := 0.105
xc3_right := 0.55
c¯_4 := 0.12
c¯_4_right := 0.125
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