# [area: Исходные данные]
d := 0.13  # калибр, м
λ_нос := 1.8  # удлинение носовой части
λ_цил := 7.5  # удлинение цилиндрической части
λ_корм := 0.1/d  # удлинение кормовой части
η_корм := 1 - 2*λ_корм*tan(7*deg) = 0.811101  # сужение кормовой части (d_корм / d)
L_хв := [0.225; 0.1]  # расстояние от конца бортовой хорды до донного среза для каждой несущей поверхности, м
b_б := [0.240; 0.115]  # длины бортовой хорды каждой несущей поверхности, м
S_нос := 2/3*λ_нос*d^2 = 0.02028  # Площадь боковой проекции носовой части, м2
# Дополнительные исходные данные
S_1 := 64383.217030*10^-6 = 0.0643832
# Площади несущих поверхностей, м2
S_2 := 26674.778998*10^-6 = 0.0266748
b_A1 := 237.57378*10^-3  # САХ первой несущей поверхности, м
x_12 := 80.969952*10^-3 = 0.08097  # расстояние от конца САХ до середины концевой хорды, м
# [area: Коэффициенты торможения]
# Коэффициент торможения потока у первой НП
kt1(M) :=
    c_x.нос ← AASM6_Cxnos_Par(M, λ_нос)[0]
    xx ← 2
    λ_кон ← root(AASM6_Cxnos_Con(M, xx)[0] - c_x.нос, xx)
    k_т1 ← AASM6_kM_Con(M, λ_кон)[0]
    k_т1
# Коэффициент торможения для второй НП
kt2(M) := kt1(M)*(AASM6_kM_P(M, x_12, b_A1)[0] + S_1/S_2)/(1 + S_1/S_2)
# Числа Маха каждой несущей поверхности
M_12(M) :=
    [M; M] if M ≤ 1
    [sqrt(kt1(M))*M; sqrt(kt2(M))*M] otherwise
# [area: Проверка расчета площади носовых частей]
# Площадь корпуса при конической носовой части
S_бок := d^2*(1/2*λ_нос + λ_цил + 1/2*(1 + η_корм)*λ_корм) = 0.153732
S_нос1 := 1/2*λ_нос*d^2
S_бок_зв := S_бок - sum(b_б[i]*d, i = 0 .. 1) = 0.107582
# результат из Компаса
S_граф.кон := 0.10758215
S_бок1 := AASM6_S_bok(d, S_нос1, λ_цил, λ_корм, η_корм, M_12(0.6), b_б, L_хв) = 0.107582
eps := |S_бок1 - S_граф.кон|/S_граф.кон = 1.75661e-6 %
# Площадь корпуса при параболической носовой части
S_бок := d^2*(2/3*λ_нос + λ_цил + 1/2*(1 + η_корм)*λ_корм) = 0.158802
S_бок_зв := S_бок - sum(b_б[i]*d, i = 0 .. 1) = 0.112652
# результат из Компаса
S_граф.пар := 0.11265206
S_бок2 := AASM6_S_bok(d, S_нос, λ_цил, λ_корм, η_корм, M_12(0.6), b_б, L_хв) = 0.112652
eps := |S_бок2 - S_граф.пар|/S_граф.пар = 8.89707e-5 %
# Площадь корпуса при эллиптической носовой части
S_бок := d^2*(π/4*λ_нос + λ_цил + 1/2*(1 + η_корм)*λ_корм) = 0.162414
S_нос3 := π/4*λ_нос*d^2
S_бок_зв := S_бок - sum(b_б[i]*d, i = 0 .. 1) = 0.116264
# результат из Компаса
S_граф.элл := 0.11626396
S_бок3 := AASM6_S_bok(d, S_нос3, λ_цил, λ_корм, η_корм, M_12(0.6), b_б, L_хв) = 0.116264
eps := |S_бок3 - S_граф.элл|/S_граф.элл = 2.82298e-6 %
# [area: Проверка при дозвуке]
# Площадь корпуса
S_бок := d^2*(2/3*λ_нос + λ_цил + 1/2*(1 + η_корм)*λ_корм) = 0.158802
S_бок_зв := S_бок - sum(b_б[i]*d, i = 0 .. 1) = 0.112652
S_бок4 := AASM6_S_bok(d, S_нос, λ_цил, λ_корм, η_корм, M_12(0.6), b_б, L_хв) = 0.112652
eps := |S_бок4 - S_бок_зв|/S_бок_зв = 5.18084e-6 %
# Для одной несущей поверхности
S_бок - b_б[1]*d = 0.143852
b_б1 := [b_б[1]]
L_хв1 := [L_хв[1]]
M_1 := [0.6]
S_бок5 := AASM6_S_bok(d, S_нос, λ_цил, λ_корм, η_корм, M_1, b_б1, L_хв1) = 0.143852
eps := |S_бок5 - (S_бок - b_б[1]*d)|/(S_бок - b_б[1]*d) = 6.88987e-6 %
# [area: Проверка выхода винтовой линии за НП]
# Для проверки убрана кормовая часть, а цилиндрическая увеличена на lambda_korm. Также для чистоты проверки будем считать, что поток не тормозится ни у одной НП. Проверки проведены с одной НП.
# Одна винтовая линия вышла за поверхность
M_пр1 := [2]
# результат из Компаса
S_граф1 := 0.14835889
S_бок6 := AASM6_S_bok(d, S_нос, λ_цил + λ_корм, 0, 0, M_пр1, b_б1, L_хв1) = 0.148359
eps := |S_бок6 - S_граф1|/S_граф1 = 0.000104737 %
# Две винтовые линии вышли за поверхность
M_пр2 := [4]
# результат из Компаса
S_граф2 := 0.15709290
S_бок7 := AASM6_S_bok(d, S_нос, λ_цил + λ_корм, 0, 0, M_пр2, b_б1, L_хв1) = 0.157093
eps := |S_бок6 - S_граф1|/S_граф1 = 0.000104737 %
# [area: Проверка выхода винтовой линии за кормовую часть]
# Проверки проведены с одной НП. Торможение потока не учитывается. НП перемещена в сторону носа ракеты на 15 мм.
# Вторая винтовая линия называется та, которая ближе к донному срезу, первая - к носу ракеты
L_хв2 := [L_хв[1] + 0.015]
# Вторая винтовая линия вышла за кормовую часть (пересечение в двух точках)
M_пр3 := [2.8]
# результат из Компаса
S_граф4 := 0.15174982
S_бок8 := AASM6_S_bok(d, S_нос, λ_цил, λ_корм, η_корм, M_пр3, b_б1, L_хв2) = 0.15175
eps := |S_бок8 - S_граф4|/S_граф4 = 0.000294269 %
# Вторая винтовая линия вышла за кормовую часть (пересечение в одной точке)
M_пр4 := [4]
# результат из Компаса
S_граф5 := 0.15604123
S_бок9 := AASM6_S_bok(d, S_нос, λ_цил, λ_корм, η_корм, M_пр4, b_б1, L_хв2) = 0.156042
eps := |S_бок9 - S_граф5|/S_граф5 = 0.000375463 %
# Первая винтовая линия вышла за кормовую часть (пересечение в двух точках)
# Кормовая часть увеличена:
λ_корм1 := 2
L_хв3 := [λ_корм1*d + 0.015]
η_корм1 := 1 - 2*λ_корм1*tan(7*deg) = 0.508862
M_пр5 := [5.8]
# результат из Компаса
S_граф6 := 0.17185999
S_бок10 := AASM6_S_bok(d, S_нос, λ_цил, λ_корм1, η_корм1, M_пр5, b_б1, L_хв3) = 0.17186
eps := |S_бок10 - S_граф6|/S_граф6 = 0.000132694 %
# Первая винтовая линия вышла за кормовую часть (пересечение в одной точке)
M_пр6 := [7.0]
# результат из Компаса
S_граф7 := 0.15847602
S_бок11 := AASM6_S_bok(d, S_нос, λ_цил, λ_корм, η_корм, M_пр6, b_б1, L_хв2) = 0.158476
eps := |S_бок11 - S_граф7|/S_граф7 = 0.000125307 %
# [area: Проверка пересечений областей]
# Для проверки физичный случай для данных геометрических параметров привести затруднительно (точка пересечения находится за донным срезом ракеты), поэтому предположим, что поток у второй НП (расположенная ближе к донному срезу) сильно
# заторможен:
M_пр7 := [4.0; 3.4]
# По большей части, здесь будет проверяться правильность выбора границ расчета площади пересечения областей.
# Введем обозначения:
# линия 1 - вторая (правая) винтовая линия первой НП;
# линия 2 - первая (левая) винтовая линия второй НП.
# Линии 1 и 2 вышли за донный срез
# результат из Компаса
S_граф8 := 0.13231913
S_бок12 := AASM6_S_bok(d, S_нос, λ_цил, λ_корм, η_корм, M_пр7, b_б, L_хв) = 0.13232
eps := |S_бок12 - S_граф8|/S_граф8 = 0.000557448 %
# Линия 1 вышла за донный срез, 2 - нет
# Переместим НП ближе к носу:
L_хв4 := [L_хв[0] + 0.13; L_хв[1] + 0.13]
# результат из Компаса
S_граф9 := 0.11975983
S_бок13 := AASM6_S_bok(d, S_нос, λ_цил, λ_корм, η_корм, M_пр7, b_б, L_хв4) = 0.11976
eps := |S_бок13 - S_граф9|/S_граф9 = 0.000203508 %
# Линии 1 и 2 не выходят за донный срез
# Переместим НП ближе к носу:
L_хв4 := [L_хв[0] + 0.18; L_хв[1] + 0.18]
# результат из Компаса
S_граф10 := 0.11745389
S_бок14 := AASM6_S_bok(d, S_нос, λ_цил, λ_корм, η_корм, M_пр7, b_б, L_хв4) = 0.117454
eps := |S_бок14 - S_граф10|/S_граф10 = 0.000169619 %
# Случай, когда расстояние между поверхностями слишком мало,
# линия 2 близка к 1
M_пр8 := M_12(1.0066) = [1.00659; 1.00007]
L_хв5 := [L_хв[0]; L_хв[1] + 0.005]
# результат из Компаса
S_граф11 := 0.11293448
S_бок16 := AASM6_S_bok(d, S_нос, λ_цил, λ_корм, η_корм, M_пр8, b_б, L_хв5) = 0.112935
eps := |S_бок16 - S_граф11|/S_граф11 = 0.000110052 %
# Линия 1 - винтовая линия, линия 2 - прямая
M_пр9 := M_12(1.0048) = [1.00479; 0.998313]
# результат из Компаса
S_граф12 := 0.11289519
S_бок17 := AASM6_S_bok(d, S_нос, λ_цил, λ_корм, η_корм, M_пр9, b_б, L_хв5) = 0.112895
eps := |S_бок17 - S_граф12|/S_граф12 = 0.000106227 %
# [area: Зависимость Sбок от M]
S_бок.числ(M) :=
    M_1и2 ← M_12(M)
    AASM6_S_bok(d, S_нос, λ_цил, λ_корм, η_корм, M_1и2, b_б, L_хв)
# Площадь, рассчитанная через Компас
S_гр := [0.11265206; 0.11265206; 0.11276997; 0.11566500; 0.12381306; 0.13207139; 0.14255673; 0.14568016; 0.14932576; 0.15175999; 0.15345631; 0.15468271; 0.15776036]
M_гр := [0; 1; 1.5; 2; 3; 4; 5.4; 6; 7; 8; 9; 10; 17]
# Отклонение
eps_гр :=
    for i ∈ 0 .. length(M_гр) - 1
        xx[i] ← (S_бок.числ(M_гр[i]) - S_гр[i])/S_бок.числ(M_гр[i])*100
    xx
MM := 0, 0.0001 .. 17
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# [area: Уравнение винтовой линии (для Компаса)]
z(x, M) := d/2*cos(2*x/(d*sqrt(M^2 - 1)))  # уравнение винтовой линии
h(M) := π*d/4*sqrt(M^2 - 1)  # четверть шага винтовой линии
x(M) := 0, h(M)/100 .. h(M)  # для формирования массива
M_0 := 2.61  # число Маха невозмущенного потока
M_12 := [1.0047949; 2]
h(M_12) = [10.0106; 176.845]*10^-3
x1 := x(M_12[0])
x2 := x(M_12[1])
x1*1000 = [
    0; 0.100106; 0.200211; 0.300317; 0.400422; 0.500528; 0.600633; 0.700739; 0.800844; 0.90095
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]
z(x1, M_12[0])*1000 = [
    65; 64.992; 64.9679; 64.9278; 64.8717; 64.7996; 64.7115; 64.6075; 64.4875; 64.3515
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]
x2*1000 = [
    0; 1.76845; 3.53691; 5.30536; 7.07382; 8.84227; 10.6107; 12.3792; 14.1476; 15.9161
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]
z(x2, M_12[1])*1000 = [
    65; 64.992; 64.9679; 64.9278; 64.8717; 64.7996; 64.7115; 64.6075; 64.4875; 64.3515
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]
