M := 0, 0.0005 .. 2
tan(hi) =  # error: Эта переменная не определена.
hi := 0, 0.1 .. 4.1
X(M, hi) :=
    xf ← sqrt(M^2 - 1)/tan(hi) if M ≥ 1
    xf ← sqrt(1 - M^2)/(-tan(hi)) if M < 1
    return xf  # α
hi := 0.8
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