l_II := 2
z_v := 1.7
ζ_кII := 1
D_II := 2*0.6
y_v := 0.4
AASM6_interference_v(ζ_кII, D_II, l_II, y_v, z_v) = [0.8263; 1 + 1i; 0.6 + 0.6i; 0.4i; 1.7 + 2.8i]
M :=
    i ← 0
    j ← 0
    for x ∈ 0, 0.01 .. 2.8
        j ← 0
        for y ∈ 0, 0.01 .. 2
            M[i, j] ← AASM6_interference_v(ζ_кII, D_II, l_II, y, x)[0]
            j ← j + 1
        i ← i + 1
    return M
M[i, j] ← AASM6_interference_v(ζ_кII, 0, l_II, y, x)[0]
M =  # no stored result
# [component: inputs M]
# [component: inputs M]
# [component: inputs M]
# [component: inputs M]
# [component: inputs M]
