λ_k1 := 4
b_p := 0, 0.0005 .. 0.5
M := 0.96825
res := λ_k1*sqrt(1 - M^2) = 0.999935
M := 0.927
res := λ_k1*sqrt(1 - M^2) = 1.50025
M := 0.866
res := λ_k1*sqrt(1 - M^2) = 2.00018
M := 0.6615
res := λ_k1*sqrt(1 - M^2) = 2.99978
M := 0.01
res := λ_k1*sqrt(1 - M^2) = 3.9998
λ_k2 := 4.5
M := 0.01
res := λ_k2*sqrt(1 - M^2) = 4.49977
λ_k3 := 3.5
M := 0.98973
res := λ_k3*sqrt(1 - M^2) = 0.500323
AASM6_nn_Eff2(0.98973, λ_k3, 1.1)[0] =  # error: Число не должно быть больше 1
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