# [area: Варьирование комплекса 1-ого уровня (Ось Х)]
λ_нос := 0.5
M := 0.01, 0.011 .. 3.0
X(M) :=
    xf ← sqrt(M^2 - 1)/λ_нос if M ≥ 1
    xf ← -sqrt(|M^2 - 1|)/λ_нос if M < 1
    return xf
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